*Heading
** Job name: Coupled_Analysis Model name: Torque_Tube_Model
** Generated by: Abaqus/CAE 6.14-2
*Preprint, echo=NO, model=NO, history=NO, contact=NO
**
** PARTS
**
*Part, name=Torque_Tube
*Node
      1, 0.0199999996,           0., -0.100000001
      2, 0.0199999996,           0.,  0.100000001
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*Element, type=C3D8T
  1,  88, 289, 689, 277,   1,  17, 193,  50
  2, 289, 290, 690, 689,  17,  18, 194, 193
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*Nset, nset=Torque_Tube_Geometry, generate
    1,  1024,     1
*Elset, elset=Torque_Tube_Geometry, generate
   1,  720,    1
*Nset, nset=Longitudinal_Edges
   1,   2,   3,   4,   5,   6
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*Elset, elset=Longitudinal_Edges
   1,   2,   3,   4,   5,   6
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*Nset, nset=Radial_Edges
   1,   2,   3,   4,   5,   6
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*Elset, elset=Radial_Edges
   1,  15,  46,  60,  61,  75
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*Nset, nset=Circumferential_Edges
   1,   2,   3,   4,   5,   6
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*Elset, elset=Circumferential_Edges
   1,  15,  16,  30,  31,  45
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*Nset, nset=Face_Z_Negative
   1,   4,   7,   8,  10,  11
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*Elset, elset=Face_Z_Negative
   1,  16,  31,  46,  61,  76
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*Nset, nset=Face_Z_Positive
   2,   3,   5,   6,   9,  12
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*Elset, elset=Face_Z_Positive
  15,  30,  45,  60,  75,  90
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*Orientation, name=Ori-1, system=CYLINDRICAL
          0.,           0.,         -0.1,           0.,           0.,          0.9
3, 0.
** Section: Solid_Section
*Solid Section, elset=Torque_Tube_Geometry, orientation=Ori-1, material=Shape_Memory_Alloy
,
*End Part
**
**
** ASSEMBLY
**
*Assembly, name=Assembly
**
*Instance, name=Torque_Tube-1, part=Torque_Tube
*End Instance
**
*Node
      1,           0.,  -1.22464679e-18,  0.100000001
*Node
      2,           0.,  -1.22464679e-18, -0.100000001
*Nset, nset=RP_Z_Negative
 2,
*Nset, nset=RP_Z_Positive
 1,
*Surface, type=NODE, name=Torque_Tube-1_Face_Z_Negative_CNS_, internal
Torque_Tube-1.Face_Z_Negative, 1.
*Nset, nset=_T-Torque_Tube-1-Cylindrical_Coordinate_System, internal
RP_Z_Negative,
*Transform, nset=_T-Torque_Tube-1-Cylindrical_Coordinate_System, type=C
          0.,           0.,         -0.1,           0.,           0.,          0.9
** Constraint: Coupling_RP_Z_Negative
*Coupling, constraint name=Coupling_RP_Z_Negative, ref node=RP_Z_Negative, surface=Torque_Tube-1_Face_Z_Negative_CNS_
*Kinematic
*End Assembly
*Amplitude, name=Temperature_Variation
             0.,            280.,             20.,            400.
**
** MATERIALS
**
*Material, name=Shape_Memory_Alloy
*Conductivity
18.,
*Density
6500.,
*Depvar
     32,
*Expansion
0.,
*Specific Heat
470.,
*User Material, constants=38
6500.,    6.62e+10,    2.56e+10,        0.33,        300.,          0.,          0.,     1.5e+08
 9.01772e+06, 8.34255e+06,        470.,        470.,        285.,        310.,        315.,        330.
   0.0482024, 1.29056e-08,       5e+07,          0.,          0.,          0.,     2.5e+07,       5e+07
        0.95,        0.95,        0.95,        0.95,       1e-06,       1e-09,      0.9999,          6.
          0.,          0.,          1.,          0.,          0.,          0.
**
** BOUNDARY CONDITIONS
**
** Name: Fixed_End Type: Displacement/Rotation
*Boundary
RP_Z_Negative, 1, 1
RP_Z_Negative, 2, 2
RP_Z_Negative, 3, 3
RP_Z_Negative, 4, 4
RP_Z_Negative, 5, 5
RP_Z_Negative, 6, 6
**
** PREDEFINED FIELDS
**
** Name: Initial_Temperature   Type: Temperature
*Initial Conditions, type=TEMPERATURE
Torque_Tube-1.Torque_Tube_Geometry, 280.
** ----------------------------------------------------------------
**
** STEP: Thermomechanically_Coupled_Step
**
*Step, name=Thermomechanically_Coupled_Step, nlgeom=NO, inc=1000000
*Coupled Temperature-displacement, creep=none, deltmx=100.
0.1, 20., 1e-08, 0.1
**
** BOUNDARY CONDITIONS
**
** Name: Temperature_BC Type: Temperature
*Boundary, amplitude=Temperature_Variation
Torque_Tube-1.Torque_Tube_Geometry, 11, 11, 1.
**
** OUTPUT REQUESTS
**
*Restart, write, frequency=0
**
** FIELD OUTPUT: Field_Output
**
*Output, field
*Node Output
NT, RF, U
*Element Output, directions=YES
E, HBF, HFL, MISES, S, SDV, TEMP
**
** HISTORY OUTPUT: History_Output
**
*Output, history, variable=PRESELECT
*End Step
